# Расчет параметров калибровки
# Ближняя точка замера:
Real_fon_on_sensor := 0.001
x := 0
Len1 := 10  # Расстояние в милиметрах от центра источника до стенки дозиметра
Fon := 0
Fon1 := 43.12  # Фон отображаемый в этой точке
# Дальняя точка замера:
Len2 := 20  # Расстояние в милиметрах от центра источника до стенки дозиметра
Fon2 := 15.4  # Фон отображаемый в этой точке
# Расчетный фон эталона для ближней точки:
Ethalon_FON_for_Len1 := 107.98
# Время установленное в настройках:
Time_in_settings := 500
Given
Fon1/Fon2 == (Len2 + x)^2/(Len1 + x)^2
Len_to_sens := Find(x) = 4.85178  # Миллиметры от корпуса до центра датчика
Given
Len_to_sens := 4.9  # disabled
Ethalon_FON_for_Len1/Real_fon_on_sensor == (Len1 + Len_to_sens)^2/Len1^2
Real_fon_on_sensor := Find(Real_fon_on_sensor) = 48.9538  # В точке 1 должен фиксироваться этот фон с учетом геометрии датчика
Corrected_time := (Real_fon_on_sensor/Fon1)*Time_in_settings = 567.646  # Установить в меню это время счета
# Расчет гамма-констатны с учетом экрана
A(E) := if(0.01 ≤ E < 0.03, -20.477, if(0.03 ≤ E < 0.5, -13.626, if(0.5 ≤ E < 5, -13.133, if(5 ≤ E < 15, -12.791, 0))))
B(E) := if(0.01 ≤ E < 0.03, -1.7454, if(0.03 ≤ E < 0.5, -0.57117, if(0.5 ≤ E < 5, 0.72008, if(5 ≤ E < 15, 0.28309, 0))))
C(E) := if(0.03 ≤ E < 0.5, -1.0954, if(0.5 ≤ E < 5, -0.033603, if(5 ≤ E < 15, 0.10873, 0)))
F(E) := if(0.03 ≤ E < 0.5, -0.24897, 0)
thin := 1  # mm
R := 100  # cm
D(E) := e^(F(E)*ln(E)^3 + C(E)*ln(E)^2 + B(E)*ln(E) + A(E))
Γ_uni(energy, prop, atten) := prop*D(energy*10^-3)*exp(-atten*thin/10)*10^7/(4*π*R^2)
Γ := Γ_uni(22.1629, 0.551, 3.441) + Γ_uni(21.9903, 0.2921, 3.441) + Γ_uni(24.90, 0.1791, 3.441) + Γ_uni(88.0336, 0.037, 0.218)
# Расчет фона по закону обратных квадратов
Γ = 5.60948e-5  # (mSv/h)/MBq/m
Len_table := 1000  # mm
Activity := 700000  # Bq
Len_calc := 10  # mm
Len_to_sens := 0
# Cs-137: Γ 1.017-4
# Eu-152: Γ 2.009-4
# Na-22:  Γ 3.620-4
# Cd-109: Γ 4.983-5
Given
Len_table^2/(Len_calc + Len_to_sens)^2 == Fon/(Γ*Activity)
Find(Fon*10^-3) = 392.664  # μSv/h
